f(x) := 1/(1 + e^(-x))
d/dx(f(x)) → e^(-x)/(e^(-x) + 1)^2
f3(x) := f(x)*(1 - f(x))
f3(x) → -(1/(e^(-x) + 1) - 1)/(e^(-x) + 1)
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f1(x) := e^x
f2(x) := e^(-x)
ff(x) := (f1(x) - f2(x))/(f1(x) + f2(x))
d/dx(ff(x)) → 1 - (e^(-x) - e^x)^2/(e^(-x) + e^x)^2
ff(x) → -(e^(-x) - e^x)/(e^(-x) + e^x)
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